OpenVSP model (file version 5), 13 components.
Geometry view with OpenVSP parameter names; values to 6 digits, angles in degrees, lengths in the model's unit.
Overall bounding box: X_Min=-0.240043 X_Len=6.24004 Y_Min=-3.5 Y_Len=7 Z_Min=-0.6675 Z_Len=2.08804

Wing "Main Wing"
  location (X Y Z) 1.3 0 0.315, rotation 0 0 0
  symmetric about XZ
  bounding box size 1.61753 7 0.252982
  totals: TotalSpan=7 TotalProjectedSpan=7 TotalChord=1.25333 TotalArea=8.77333 TotalAR=5.58511
  root: chord 1.6172, twist 2, NACA 4-series Camber=0.06 CamberLoc=0.4 ThickChord=0.15
  sections:
    n  Span  Root_Chord  Tip_Chord  Area     Sweep  Sweep_Location  Dihedral  Twist  Twist_Location  tip airfoil
    1  3.5   1.6172      0.889462   4.38667  0      0.25            0         0      0.25            as above
  SS_Control "SS_CONT_0": EtaStart=0.95 EtaEnd=0.55 Length_C_Start=0.25 Length_C_End=0.25 Length_Start=0.231451 Length_End=0.304192 LE_Flag=0 Surf_Type=2

Fuselage "FuselageGeom", child of "Main Wing"
  location (X Y Z) 0 0 0, rotation 0 0 0
  bounding box size 6.16969 0.84848 0.966703
  Design: Length=6
  cross sections:
    n  XLocPercent  YLocPercent  ZLocPercent  shape
    0  0            0            -0.00819672  rounded rectangle RoundRectXSec_Radius=0.2 RoundedRect_Height=0.475 RoundedRect_Width=0.475
    1  0.25         0            0.01         rounded rectangle RoundRectXSec_Radius=0.2 RoundedRect_Height=0.9 RoundedRect_Width=0.707265
    2  0.434426     0            0.0075       rounded rectangle RoundRectXSec_Radius=0.2 RoundedRect_Height=0.75 RoundedRect_Width=0.6
    3  1            0            0.0325836    rounded rectangle RoundRectXSec_Radius=0.05 RoundedRect_Height=0.15 RoundedRect_Width=0.2

Custom "Batteria", child of "FuselageGeom"
  location (X Y Z) 0.4 0 -0.02, rotation 90 0 0
  bounding box size 0.770997 0.380577 0.564304
  mass: Density=1 Shell_Flag=0 Mass_Area=1 Mass_Prior=0 PointMass=12.7868 CGx=0 CGy=0 CGz=0 Ixx=0 Iyy=0 Izz=0 Ixy=0 Ixz=0 Iyz=0
  Design: Height=0.380577 Length=0.770997 SquareFlag=0 Width=0.564304
  custom script Box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

Custom "Kraken Heat Sink", child of "FuselageGeom"
  location (X Y Z) 1.25 0 0.27, rotation 0 90 0
  bounding box size 0.0848425 0.368438 0.580709
  Design: Height=0.0848425 Length=0.580709 SquareFlag=0 Width=0.368438
  custom script Box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

Custom "Backup Battery", child of "FuselageGeom"
  location (X Y Z) 0.377231 0 0.247231, rotation 0 90 0; relative location 0.1 0 -0.03, rotation 0 90 0
  bounding box size 0.161 0.207 0.554462
  Design: Height=0.161 Length=0.554462 SquareFlag=0 Width=0.207
  custom script Box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

Custom "Avionics Tray", child of "FuselageGeom"
  location (X Y Z) 1.35 0 -0.017, rotation 0 0 0
  bounding box size 0.55 0.55 0.55
  Design: Height=0.55 Length=0.55 SquareFlag=1 Width=0.55
  custom script Box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

Custom "Payload + Mechanism", child of "FuselageGeom"
  location (X Y Z) 1.4185 0 -0.55, rotation 0 0 0
  bounding box size 0.78125 0.235 0.235
  Design: Height=0.235 Length=0.78125 SquareFlag=0 Width=0.235
  custom script Box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

Wing "Vert Stab"
  location (X Y Z) 5 0 0.166667, rotation 90 0 0
  bounding box size 0.874331 0.0836401 1.25387
  totals: TotalSpan=1.25387 TotalProjectedSpan=1.25387 TotalChord=0.626937 TotalArea=0.7861 TotalAR=2
  root: chord 0.835916, twist 0, NACA 4-series Camber=0 CamberLoc=0.2 ThickChord=0.1
  sections:
    n  Span     Root_Chord  Tip_Chord  Area    Sweep  Sweep_Location  Dihedral  Twist  Twist_Location  tip airfoil
    1  1.25387  0.835916    0.417958   0.7861  20     0               0         0      0.25            as above
  SS_Control "SS_CONT_0": EtaStart=0.15 EtaEnd=0.9 Length_C_Start=0.25 Length_C_End=0.25 Length_Start=0.193306 Length_End=0.114938 LE_Flag=0 Surf_Type=2

Wing "Horz Stab"
  location (X Y Z) 4.9 0 0.2, rotation 0 0 0
  symmetric about XZ
  bounding box size 1.00015 2.25167 0.122821
  totals: TotalSpan=2.25167 TotalProjectedSpan=2.25167 TotalChord=0.750555 TotalArea=1.69 TotalAR=3
  root: chord 1.00074, twist -2, NACA 4-series Camber=0 CamberLoc=0.2 ThickChord=0.12
  sections:
    n  Span     Root_Chord  Tip_Chord  Area   Sweep  Sweep_Location  Dihedral  Twist  Twist_Location  tip airfoil
    1  1.12583  1.00074     0.50037    0.845  20     0               0         0      0.25            as above
  SS_Control "SS_CONT_0": EtaStart=0.3 EtaEnd=0.95 Length_C_Start=0.25 Length_C_End=0.25 Length_Start=0.212639 Length_End=0.13134 LE_Flag=0 Surf_Type=2

Propeller "PropGeom"
  location (X Y Z) -0.2 0 -0.075, rotation 0 0 0
  bounding box size 0.0786868 1.58619 0.153712
  Design: Diameter=1.58333 NumBlade=2 Beta34=20 UseBeta34Flag=1 Feather=0 Rotate=0 Precone=0 ReverseFlag=0 FoldAngle=0 PropMode=0 AF=151.538 CLi=0.538798 Chord=0.177656 Solidity=0.113099 ConstructXoC=0.5 FeatherAxisXoC=0.5 FeatherOffsetXoC=0
  cross sections:
    n  RadiusFrac  shape
    0  0.2         ellipse Ellipse_Height=0.0316667 Ellipse_Width=0.0633333
    1  0.4         NACA 16-series Chord=0.131615 IdealCl=0.7 ThickChord=0.144074
    2  1           NACA 16-series Chord=0.102917 IdealCl=0.2 ThickChord=0.03
  Chord along r/R (cubic Bezier): 0.2: 0.08, 0.333333: 0.15, 0.466667: 0.2, 0.6: 0.2, 0.716667: 0.2, 0.833333: 0.2, 0.95: 0.2, 0.966667: 0.2, 0.983333: 0.2, 1: 0.13
  Twist along r/R (PCHIP): 0.2: 46.75, 0.75: 20, 1: 13
  Thick along r/R (cubic Bezier): 0.2: 0.5, 0.233333: 0.3, 0.266667: 0.225, 0.3: 0.2, 0.4: 0.125, 0.5: 0.115, 0.6: 0.1, 0.733333: 0.075, 0.866667: 0.055, 1: 0.03
  CLI along r/R (cubic Bezier): 0.2: 0, 0.266667: 0.7, 0.333333: 0.7, 0.4: 0.7, 0.466667: 0.7, 0.533333: 0.7, 0.6: 0.7, 0.733333: 0.7, 0.866667: 0.7, 1: 0.2

Stack "Antenna Array Wing Tips"
  location (X Y Z) 1.9 3.25 0.67, rotation 1.55738 90 0
  symmetric about XZ
  bounding box size 0.1 6.61355 0.252625
  cross sections:
    n  XDelta  YDelta  ZDelta  shape
    0  0       0       0       circle Circle_Diameter=0.1
    1  0.25    0       0       as above

Stack "Antenna Array Nose", child of "Antenna Array Wing Tips"
  location (X Y Z) 0.163934 0 0.2, rotation 1.55738 90 0; relative location 0.163934 0 0.2, rotation 0 90 1.55738
  bounding box size 0.1 0.106758 0.252625
  cross sections:
    n  XDelta  YDelta  ZDelta  shape
    0  0       0       0       circle Circle_Diameter=0.1
    1  0.25    0       0       as above

Stack "Antenna Array Tail", child of "Antenna Array Wing Tips"
  location (X Y Z) 5.5 1 0.45, rotation 1.55738 90 0; relative location 5.5 1 0.45, rotation 0 90 1.55738
  symmetric about XZ
  bounding box size 0.1 2.11355 0.252625
  cross sections:
    n  XDelta  YDelta  ZDelta  shape
    0  0       0       0       circle Circle_Diameter=0.1
    1  0.25    0       0       as above

VSPAERO settings: Sref=11.9267 bref=7 cref=1.75032 Xcg=0 Ycg=0 Zcg=0 AlphaStart=0 AlphaEnd=15 AlphaNpts=15 BetaStart=0 BetaEnd=0 BetaNpts=1 MachStart=0 MachEnd=0 MachNpts=1 ReCref=910819 Vinf=100 Rho=0.002377
